Thu Dec 22 08:08:12 PST 2022
;; ; 2. Description: ETH 1 cmt IIV on CL, V, KA +ALAG1
;; x1. Author: Silver
;; 1. Based on: 1
$SIZES      PD=-100
$PROBLEM    Ethambutol 1 comp PK
$INPUT      ID USUBJIDNEW FIRSTDDATE=DROP NDATE=DROP NTIME=DROP DAY DV
            MDV EVID AMT COMPAR LLOQ BLOQ ACTTIME TAF SITE AFRICAN ARM
            AGE SEX RACE HIV CD4 VIRALLOAD HT WT BMI CAVITY CXRCLASS
            CXREXTNT SMEAR KARNOFSKY AESAE DIABETES ALCOHOL DOSEESTX
            DTC NDOT VOMIT DRUG DOSER DOSEP DOSEH DOSEZ DOSEE DOSEM
            TIME TAD TRAIN_FLAG NO_PK DIABETES2
$DATA      prelim_data_EMB_20221217_D.csv IGNORE=@ IGNORE(TAD.GT.13)
$SUBROUTINE ADVAN6 TOL=5
$MODEL      NCOMP=2 COMP=(ABS,DEFDOSE) COMP=(CENTRAL,DEFOBS)
$PK

;; F1RACE-DEFINITION START
IF(RACE.EQ.1.0000E+00) F1RACE = 1  ; Most common
IF(RACE.EQ.5.0000E+00) F1RACE = ( 1 + THETA(7))
IF(RACE.EQ.2.0000E+00) F1RACE = 1
IF(RACE.EQ.4.0000E+00) F1RACE = 1
IF(RACE.EQ.3.0000E+00) F1RACE = 1
;;; F1RACE-DEFINITION END

;;; F1-RELATION START
F1COV=F1RACE
;;; F1-RELATION END

;;; CLDIABETES-DEFINITION START
IF(DIABETES2.EQ.0.0000E+00) CLDIABETES2 = 1  ; Most common
IF(DIABETES2.EQ.1.0000E+00) CLDIABETES2 = ( 1 + THETA(8))
;;; CLDIABETES-DEFINITION END

;;; CLWT-DEFINITION START
CLWT = EXP(THETA(9)*(WT - 53))
;;; CLWT-DEFINITION END

;;; CL-RELATION START
CLCOV=CLDIABETES2*CLWT
;;; CL-RELATION END

TVALAG1 = THETA(6)
ALAG1 = TVALAG1 * EXP(ETA(5))

TVCL = THETA(3) * CLCOV
CL = TVCL * EXP(ETA(1))

TVV = THETA(4)
V = TVV*EXP(ETA(2))

TVKA = TVCL/TVV + THETA(5)
KA = TVKA*EXP(ETA(3))

KE = CL/V

S2 = V
TVF1 = 1 * F1COV
F1 = TVF1 * EXP(ETA(4))

$DES
DADT(1)=-KA*A(1)
DADT(2)= KA*A(1)-KE*A(2)

$ERROR

IPRED=A(2)/V

WA=THETA(1)
WP=THETA(2)
W = SQRT(WA**2+(WP*IPRED)**2)
IRES=DV-IPRED
IWRES=IRES/W
Y = IPRED + W*EPS(1)

$THETA  0 FIX ; 1 Additive Error mg/L
 (0,0.5288) ; 2 Proportional Error
 (0,15.69893) ; 3 CL L/h
 (0,50.6803) ; 4 V L
 (0,0.083198) ; 5 KA 1/h
 (0,0.5) ; 6 ALAG1 h
 (-1,-0.114561,5) ; F1RACE1
 (-1,0.240567,5) ; CLDIABETES2
 (-0.104662958772457,0.0269937,0.104662958772457) ; CLWT
$OMEGA  0.10328  ;     IIV CL
 0.1  ;      IIV V
 0.1  ;     IIV KA
 0  FIX  ;     IIV F1
 0  FIX  ;  IIV ALAG1
$SIGMA  1  FIX
$ESTIMATION METHOD=1 INTERACTION PRINT=5 SIG=3 MAXEVAL=9999 NOABORT
$COVARIANCE PRINT=E UNCONDITIONAL
;Sim_start

; $SIM (12345) (54321) ONLYSIM NSUB=200
$TABLE      USUBJIDNEW ID IPRED TIME DAY DRUG DOSER DOSEP DOSEH DOSEZ
            DOSEE DOSEM TAD DV MDV EVID AMT LLOQ BLOQ ACTTIME TAF SITE
            AFRICAN ARM AGE SEX RACE HIV CD4 VIRALLOAD HT WT BMI
            CAVITY CXRCLASS CXREXTNT SMEAR KARNOFSKY AESAE DIABETES
            DIABETES2 ALCOHOL DOSEESTX DTC NDOT VOMIT PRED IPRED CL
            CLWT V KA F1 ALAG1 TVALAG1 TVF1 TVV TVCL TVKA WRES CWRES
            ETA1 ETA2 ETA3 ETA4 NOPRINT FORMAT=s1PE17.9 ONEHEADER
            FILE=emb04

NM-TRAN MESSAGES
 WARNINGS AND ERRORS (IF ANY) FOR PROBLEM    1
 (WARNING  2) NM-TRAN INFERS THAT THE DATA ARE POPULATION.

1NONLINEAR MIXED EFFECTS MODEL PROGRAM (NONMEM) VERSION 7.4.3
 ORIGINALLY DEVELOPED BY STUART BEAL, LEWIS SHEINER, AND ALISON BOECKMANN
 CURRENT DEVELOPERS ARE ROBERT BAUER, ICON DEVELOPMENT SOLUTIONS,
 AND ALISON BOECKMANN. IMPLEMENTATION, EFFICIENCY, AND STANDARDIZATION
 PERFORMED BY NOUS INFOSYSTEMS.
 PROBLEM NO.:         1
 Ethambutol 1 comp PK
 TOT. NO. OF OBS RECS:     3077
 TOT. NO. OF INDIVIDUALS:     1653
 GENERAL NONLINEAR KINETICS MODEL (DVERK1, ADVAN6)
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 #TBLN:      1
 #METH: First Order Conditional Estimation with Interaction
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
 #TERM:
0MINIMIZATION SUCCESSFUL
 NO. OF FUNCTION EVALUATIONS USED:      591
 NO. OF SIG. DIGITS IN FINAL EST.:  3.1

 ETABAR IS THE ARITHMETIC MEAN OF THE ETA-ESTIMATES,
 AND THE P-VALUE IS GIVEN FOR THE NULL HYPOTHESIS THAT THE TRUE MEAN IS 0.

 ETABAR:         1.6939E-02 -2.9956E-02  6.5206E-02  0.0000E+00  0.0000E+00
 SE:             1.9333E-03  2.6120E-03  1.2976E-02  0.0000E+00  0.0000E+00
 N:                    1632        1632        1632        1632        1632

 P VAL.:         1.9485E-18  1.9519E-30  5.0428E-07  1.0000E+00  1.0000E+00

 ETASHRINKSD(%)  5.3858E+01  6.5668E+01  3.2133E+01  1.0000E+02  1.0000E+02
 ETASHRINKVR(%)  7.8709E+01  8.8213E+01  5.3940E+01  1.0000E+02  1.0000E+02
 EBVSHRINKSD(%)  4.6798E+01  5.6660E+01  2.1232E+01  0.0000E+00  0.0000E+00
 EBVSHRINKVR(%)  7.1695E+01  8.1216E+01  3.7956E+01  0.0000E+00  0.0000E+00
 EPSSHRINKSD(%)  2.0300E+01
 EPSSHRINKVR(%)  3.6478E+01


 TOTAL DATA POINTS NORMALLY DISTRIBUTED (N):         3359
 N*LOG(2PI) CONSTANT TO OBJECTIVE FUNCTION:    6173.4290660689912
 OBJECTIVE FUNCTION VALUE WITHOUT CONSTANT:   -2048.0559538203984
 OBJECTIVE FUNCTION VALUE WITH CONSTANT:       4125.3731122485933
 REPORTED OBJECTIVE FUNCTION DOES NOT CONTAIN CONSTANT

 TOTAL EFFECTIVE ETAS (NIND*NETA):                          4899


 #TERE:
 Elapsed estimation  time in seconds:  1393.26
 Elapsed covariance  time in seconds:  1028.58
 Elapsed postprocess time in seconds:    19.64

 ********************               FIRST ORDER CONDITIONAL ESTIMATION WITH INTERACTION              ********************
 #OBJT:**************                       MINIMUM VALUE OF OBJECTIVE FUNCTION                      ********************
 #OBJV:********************************************    -2048.056       **************************************************

 ********************               FIRST ORDER CONDITIONAL ESTIMATION WITH INTERACTION              ********************
 ********************                             FINAL PARAMETER ESTIMATE                           ********************

 THETA - VECTOR OF FIXED EFFECTS PARAMETERS   *********
         TH 1      TH 2      TH 3      TH 4      TH 5      TH 6      TH 7      TH 8      TH 9
         0.00E+00  3.11E-01  5.72E+01  3.41E+02  3.86E-01  2.08E-01 -8.91E-02  1.15E-01  1.11E-02

 OMEGA - COV MATRIX FOR RANDOM EFFECTS - ETAS  ********
         ETA1      ETA2      ETA3      ETA4      ETA5
 ETA1
+        2.87E-02
 ETA2
+        0.00E+00  9.45E-02
 ETA3
+        0.00E+00  0.00E+00  5.97E-01
 ETA4
+        0.00E+00  0.00E+00  0.00E+00  0.00E+00
 ETA5
+        0.00E+00  0.00E+00  0.00E+00  0.00E+00  0.00E+00

 SIGMA - COV MATRIX FOR RANDOM EFFECTS - EPSILONS  ****
         EPS1
 EPS1
+        1.00E+00

 OMEGA - CORR MATRIX FOR RANDOM EFFECTS - ETAS  *******
         ETA1      ETA2      ETA3      ETA4      ETA5
 ETA1
+        1.69E-01
 ETA2
+        0.00E+00  3.07E-01
 ETA3
+        0.00E+00  0.00E+00  7.73E-01
 ETA4
+        0.00E+00  0.00E+00  0.00E+00  0.00E+00
 ETA5
+        0.00E+00  0.00E+00  0.00E+00  0.00E+00  0.00E+00

 SIGMA - CORR MATRIX FOR RANDOM EFFECTS - EPSILONS  ***
         EPS1
 EPS1
+        1.00E+00

 ********************               FIRST ORDER CONDITIONAL ESTIMATION WITH INTERACTION              ********************
 ********************                            STANDARD ERROR OF ESTIMATE                          ********************

 THETA - VECTOR OF FIXED EFFECTS PARAMETERS   *********
         TH 1      TH 2      TH 3      TH 4      TH 5      TH 6      TH 7      TH 8      TH 9
        .........  6.92E-03  7.64E-01  1.52E+01  3.64E-02  1.25E-02  2.03E-02  4.99E-02  1.44E-03

 OMEGA - COV MATRIX FOR RANDOM EFFECTS - ETAS  ********
         ETA1      ETA2      ETA3      ETA4      ETA5
 ETA1
+        9.41E-03
 ETA2
+       .........  2.74E-02
 ETA3
+       ......... .........  4.17E-02
 ETA4
+       ......... ......... ......... .........
 ETA5
+       ......... ......... ......... ......... .........

 SIGMA - COV MATRIX FOR RANDOM EFFECTS - EPSILONS  ****
         EPS1
 EPS1
+       .........

 OMEGA - CORR MATRIX FOR RANDOM EFFECTS - ETAS  *******
         ETA1      ETA2      ETA3      ETA4      ETA5
 ETA1
+        2.78E-02
 ETA2
+       .........  4.46E-02
 ETA3
+       ......... .........  2.70E-02
 ETA4
+       ......... ......... ......... .........
 ETA5
+       ......... ......... ......... ......... .........

 SIGMA - CORR MATRIX FOR RANDOM EFFECTS - EPSILONS  ***
         EPS1
 EPS1
+       .........
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
 ********************               FIRST ORDER CONDITIONAL ESTIMATION WITH INTERACTION              ********************
 ********************                      EIGENVALUES OF COR MATRIX OF ESTIMATE                     ********************

             1         2         3         4         5         6         7         8         9        10        11
         6.58E-02  7.46E-02  2.77E-01  4.03E-01  5.75E-01  6.44E-01  9.72E-01  1.14E+00  1.21E+00  2.46E+00  3.18E+00
 Elapsed finaloutput time in seconds:     9.91
 #CPUT: Total CPU Time in Seconds,    18404.502
