Mon Oct 14 06:13:33 UTC 2019
;; 1. Based on: B008
;; 2. Description: + DOSE on F Power
;; x1. Author:
;; Date: 2019-10-14 04:25:45
$PROBLEM    Covariate Model Development
$INPUT      SUBJID=DROP TIME DV ID EVID MDV AMT II ADDL DOSE POP TAD
$DATA      ppkdat_2019-10-12.csv IGNORE=@
$SUBROUTINE ADVAN4 TRANS4
$PK

TVKA    = THETA(1)
TVCL    = THETA(2)
TVV2    = THETA(3)
TVQ     = THETA(4)
TVV3    = THETA(5)
TVALAG1 = THETA(6)

KA    =  TVKA    * EXP(ETA(1)) ;
CL    =  TVCL    * EXP(ETA(2)) ;
V2    =  TVV2    * EXP(ETA(3)) ;
Q     =  TVQ     * EXP(ETA(4)) ;
V3    =  TVV3    * EXP(ETA(5)) ;
ALAG1 =  TVALAG1 * EXP(ETA(6)) ;

S2 = (V2/1000)

TVF1 = 1
F1    =  TVF1* (DOSE/60)**THETA(7)     * EXP(ETA(7)) ;

$ERROR
EPS_Y = EPS(1)
IPRED = F
W = IPRED
Y = IPRED+W*EPS_Y
IRES = DV - IPRED
IWRES = IRES/W

$THETA  (0,0.3,100) ; th1-KA: Absorption Rate Constant (1/hr)
 (0,15.3,1000) ; th2-CL: Clearance (L/hr)
 (0,228,1000) ; th3-V2: Central Volume of Distribution (L)
 (0,15.3,1000) ; th4-Q : Iner-Comparmental Clearance (L/hr)
 (0,300,1000) ; th5-V3: Peripheral Volume of Distribution (L)
 (0,0.1,10) ; th6-ALAG1: Absorption Lag Time (hr)
 (-10,-1,10) ; th7-F1-DOSE: Power Exponent
;; Structual Parameter
;; Covariate Effect
$OMEGA  0.1  ; eta1-IIV in KA
 0.1  ; eta2-IIV in CL
 0  FIX  ; eta3-IIV in V2
 0  FIX  ; eta4-IIV in Q
 0.1  ; eta5-IIV in V3
 0.1  ; eta6-IIV in ALAG1
 0.1  ; eta7-IIV in F1
$SIGMA  0.109  ; eps1-RV, Proportional
$ESTIMATION METHOD=COND NSIG=3 SIGL=9 MAXEVALS=9999 PRINT=10 NOABORT
            INTER
$COVARIANCE
$TABLE      ID TIME TAD EVID MDV IPRED IRES IWRES CWRES NPDE NOPRINT
            ONEHEADER FILE=sdtabC001
$TABLE      ID ETAS(1:LAST) CL KA V2 Q V3 ALAG1 ONEHEADER NOPRINT
            FILE=patabC001
$TABLE      ID ETAS(1:LAST) ONEHEADER NOPRINT FILE=cotabC001
$TABLE      ID ETAS(1:LAST) DOSE POP ONEHEADER NOPRINT FILE=catabC001

NM-TRAN MESSAGES
 WARNINGS AND ERRORS (IF ANY) FOR PROBLEM    1
 (WARNING  2) NM-TRAN INFERS THAT THE DATA ARE POPULATION.

1NONLINEAR MIXED EFFECTS MODEL PROGRAM (NONMEM) VERSION 7.4.3
 ORIGINALLY DEVELOPED BY STUART BEAL, LEWIS SHEINER, AND ALISON BOECKMANN
 CURRENT DEVELOPERS ARE ROBERT BAUER, ICON DEVELOPMENT SOLUTIONS,
 AND ALISON BOECKMANN. IMPLEMENTATION, EFFICIENCY, AND STANDARDIZATION
 PERFORMED BY NOUS INFOSYSTEMS.
 PROBLEM NO.:         1
 Covariate Model Development
 TOT. NO. OF OBS RECS:     1292
 TOT. NO. OF INDIVIDUALS:       64
 TWO COMPARTMENT MODEL WITH FIRST-ORDER ABSORPTION (ADVAN4)
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 #TBLN:      1
 #METH: First Order Conditional Estimation with Interaction
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
 #TERM:
0MINIMIZATION SUCCESSFUL
 HOWEVER, PROBLEMS OCCURRED WITH THE MINIMIZATION.
 REGARD THE RESULTS OF THE ESTIMATION STEP CAREFULLY, AND ACCEPT THEM ONLY
 AFTER CHECKING THAT THE COVARIANCE STEP PRODUCES REASONABLE OUTPUT.
 NO. OF FUNCTION EVALUATIONS USED:     1260
 NO. OF SIG. DIGITS IN FINAL EST.:  3.0

 ETABAR IS THE ARITHMETIC MEAN OF THE ETA-ESTIMATES,
 AND THE P-VALUE IS GIVEN FOR THE NULL HYPOTHESIS THAT THE TRUE MEAN IS 0.

 ETABAR:         2.1089E-02  9.9692E-03  0.0000E+00  0.0000E+00  4.0666E-03  9.3094E-03  7.4645E-03
 SE:             7.9220E-02  3.1102E-02  0.0000E+00  0.0000E+00  4.3545E-02  1.3500E-02  3.3745E-02
 N:                      64          64          64          64          64          64          64

 P VAL.:         7.9008E-01  7.4857E-01  1.0000E+00  1.0000E+00  9.2560E-01  4.9046E-01  8.2494E-01

 ETASHRINKSD(%)  8.3374E+00  1.0813E+01  1.0000E+02  1.0000E+02  2.0287E+01  1.7719E+01  8.4119E+00
 ETASHRINKVR(%)  1.5980E+01  2.0457E+01  1.0000E+02  1.0000E+02  3.6459E+01  3.2298E+01  1.6116E+01
 EBVSHRINKSD(%)  7.9406E+00  1.1446E+01  0.0000E+00  0.0000E+00  1.7907E+01  1.7520E+01  9.2155E+00
 EBVSHRINKVR(%)  1.5251E+01  2.1582E+01  0.0000E+00  0.0000E+00  3.2608E+01  3.1970E+01  1.7582E+01
 EPSSHRINKSD(%)  8.5980E+00
 EPSSHRINKVR(%)  1.6457E+01


 TOTAL DATA POINTS NORMALLY DISTRIBUTED (N):         1292
 N*LOG(2PI) CONSTANT TO OBJECTIVE FUNCTION:    2374.5371698008744
 OBJECTIVE FUNCTION VALUE WITHOUT CONSTANT:    8703.1166362522727
 OBJECTIVE FUNCTION VALUE WITH CONSTANT:       11077.653806053147
 REPORTED OBJECTIVE FUNCTION DOES NOT CONTAIN CONSTANT

 TOTAL EFFECTIVE ETAS (NIND*NETA):                           320


 #TERE:
 Elapsed estimation  time in seconds:    82.38
 Elapsed covariance  time in seconds:    19.91
 Elapsed postprocess time in seconds:     2.09

 ********************               FIRST ORDER CONDITIONAL ESTIMATION WITH INTERACTION              ********************
 #OBJT:**************                       MINIMUM VALUE OF OBJECTIVE FUNCTION                      ********************
 #OBJV:********************************************     8703.117       **************************************************

 ********************               FIRST ORDER CONDITIONAL ESTIMATION WITH INTERACTION              ********************
 ********************                             FINAL PARAMETER ESTIMATE                           ********************

 THETA - VECTOR OF FIXED EFFECTS PARAMETERS   *********
         TH 1      TH 2      TH 3      TH 4      TH 5      TH 6      TH 7
         6.77E-01  1.84E+01  2.42E+02  4.27E+01  2.77E+02  4.20E-01 -3.78E-01

 OMEGA - COV MATRIX FOR RANDOM EFFECTS - ETAS  ********
         ETA1      ETA2      ETA3      ETA4      ETA5      ETA6      ETA7
 ETA1
+        4.86E-01
 ETA2
+        0.00E+00  7.91E-02
 ETA3
+        0.00E+00  0.00E+00  0.00E+00
 ETA4
+        0.00E+00  0.00E+00  0.00E+00  0.00E+00
 ETA5
+        0.00E+00  0.00E+00  0.00E+00  0.00E+00  1.94E-01
 ETA6
+        0.00E+00  0.00E+00  0.00E+00  0.00E+00  0.00E+00  1.75E-02
 ETA7
+        0.00E+00  0.00E+00  0.00E+00  0.00E+00  0.00E+00  0.00E+00  8.83E-02

 SIGMA - COV MATRIX FOR RANDOM EFFECTS - EPSILONS  ****
         EPS1
 EPS1
+        6.34E-02

 OMEGA - CORR MATRIX FOR RANDOM EFFECTS - ETAS  *******
         ETA1      ETA2      ETA3      ETA4      ETA5      ETA6      ETA7
 ETA1
+        6.97E-01
 ETA2
+        0.00E+00  2.81E-01
 ETA3
+        0.00E+00  0.00E+00  0.00E+00
 ETA4
+        0.00E+00  0.00E+00  0.00E+00  0.00E+00
 ETA5
+        0.00E+00  0.00E+00  0.00E+00  0.00E+00  4.40E-01
 ETA6
+        0.00E+00  0.00E+00  0.00E+00  0.00E+00  0.00E+00  1.32E-01
 ETA7
+        0.00E+00  0.00E+00  0.00E+00  0.00E+00  0.00E+00  0.00E+00  2.97E-01

 SIGMA - CORR MATRIX FOR RANDOM EFFECTS - EPSILONS  ***
         EPS1
 EPS1
+        2.52E-01

 ********************               FIRST ORDER CONDITIONAL ESTIMATION WITH INTERACTION              ********************
 ********************                            STANDARD ERROR OF ESTIMATE                          ********************

 THETA - VECTOR OF FIXED EFFECTS PARAMETERS   *********
         TH 1      TH 2      TH 3      TH 4      TH 5      TH 6      TH 7
         8.92E-02  8.40E-01  1.54E+01  2.93E+00  2.17E+01  1.22E-02  2.94E-02

 OMEGA - COV MATRIX FOR RANDOM EFFECTS - ETAS  ********
         ETA1      ETA2      ETA3      ETA4      ETA5      ETA6      ETA7
 ETA1
+        1.87E-01
 ETA2
+       .........  2.01E-02
 ETA3
+       ......... ......... .........
 ETA4
+       ......... ......... ......... .........
 ETA5
+       ......... ......... ......... .........  5.57E-02
 ETA6
+       ......... ......... ......... ......... .........  7.47E-03
 ETA7
+       ......... ......... ......... ......... ......... .........  2.03E-02

 SIGMA - COV MATRIX FOR RANDOM EFFECTS - EPSILONS  ****
         EPS1
 EPS1
+        3.69E-03

 OMEGA - CORR MATRIX FOR RANDOM EFFECTS - ETAS  *******
         ETA1      ETA2      ETA3      ETA4      ETA5      ETA6      ETA7
 ETA1
+        1.34E-01
 ETA2
+       .........  3.57E-02
 ETA3
+       ......... ......... .........
 ETA4
+       ......... ......... ......... .........
 ETA5
+       ......... ......... ......... .........  6.32E-02
 ETA6
+       ......... ......... ......... ......... .........  2.82E-02
 ETA7
+       ......... ......... ......... ......... ......... .........  3.41E-02

 SIGMA - CORR MATRIX FOR RANDOM EFFECTS - EPSILONS  ***
         EPS1
 EPS1
+        7.33E-03
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 Elapsed finaloutput time in seconds:     0.22
 #CPUT: Total CPU Time in Seconds,      104.689
