Thu Apr 11 14:49:55 PDT 2024
;; Based on: 130
;; Description: two compartment, metab, prop error SAME for parent + M1, nonlinear CL, IIV CLINT CLm, diff F for 1800 mg dose, M3 method
;; Author: Anu
$PROBLEM    SUTEZOLID population PK
$INPUT      ID TIME DV AMT EVID MDV CMT SEX AGE TRTPN MFL RACEN
            ETHNICN WEIGHTSC BMISC BLOQ_new STRT
$DATA      SUTPK_COV_20211101_VPC.csv IGNORE=@ IGNORE(CMT.GT.4)
 ; new dataset for VPC stratification
 ; only looking at parent + M1

; NOTES about data:

; AMT in mg

; DV in mg/L

; TIME in h
$SUBROUTINE ADVAN6 TOL=6
$MODEL      NCOMP=4 COMP(DEPOT) ; dosing
            COMP(CENTRAL,DEFOBS) ; parent
            COMP(PERIPH) ; since 2 cmpt model
            COMP(METAB) ; major metabolite
$PK
; Nonlinear CL, L/h
CLINT = THETA(1)*EXP(ETA(1))
KM = THETA(10)*EXP(ETA(6))
VMAX = KM*CLINT ; at low concs, assume CL = CLint

; Central Volume, L
TVV = THETA(2)
V = TVV*EXP(ETA(2))
S2 = V

; Peripheral Volume, L
TVV2 = THETA(6)
V2 = TVV2

; Bioavailability
IF(TRTPN.LT.4) F1 = 1
IF(TRTPN.EQ.4) F1 = THETA(11)

; Absorption rate, 1/h
TVKA = THETA(3)
KA = TVKA*EXP(ETA(3))

; Fraction of drug metabolized
Fm = 1 ; assume this to be 1

; Intercompartment CL, L/h
TVQ = THETA(7)
Q = TVQ

; Metabolite CL, L/h
TVCLm = THETA(8)
CLm = TVCLm*EXP(ETA(4))

; Metabolite Volume, L/h
TVVm = THETA(9)
Vm = TVVm*EXP(ETA(5))

$DES
CP = A(2)/S2
DADT(1) = -KA*A(1)
DADT(2) = KA*A(1) - Fm*(VMAX*CP)/(KM+CP) + Q/V2*A(3) - Q/V*A(2)
DADT(3) = Q/V*A(2) - Q/V2*A(3)
DADT(4) = Fm*(VMAX*CP)/(KM+CP) - (CLm/Vm)*A(4)

$ERROR
IPRED = F
IF(F.GT.0.AND.CMT.EQ.2) IPRED = A(2)/V
IF(F.GT.0.AND.CMT.EQ.4) IPRED = A(4)/Vm

PROP = THETA(4) ; PROPORTIONAL
ADD = THETA(5) ; ADDITIVE

W = SQRT(PROP**2*IPRED**2+ADD**2) ; combined parent and metabolite error model

IRES = DV - IPRED
IWRES = IRES/W

; IF(CMT.EQ.2) Y = IPRED + W*EPS(1)
; IF(CMT.EQ.4) Y = IPRED + W*EPS(2) ; take metab from different sigma distribution

; M3 method
LLOQ = 0.01 ; parent + M1
DUM = (LLOQ-IPRED)/W
CUMD = PHI(DUM)
;-------Above limit of quantification - parent-------
  IF(DV.GT.LLOQ.AND.CMT.EQ.2) THEN
  F_FLAG = 0
  Y = IPRED + W*EPS(1)
  ENDIF
;-------Above limit of quantification - M1-------
  IF(DV.GT.LLOQ.AND.CMT.EQ.4) THEN
  F_FLAG = 0
  Y = IPRED + W*EPS(2)
  ENDIF
;-------Below limit of quantification-------
  IF(DV.LE.LLOQ) THEN
  F_FLAG = 1
  Y = CUMD
  ENDIF

$THETA  (0,200) ; CLINT
 (0,500) ; Vc (V2)
 (0,1) ; KA
 (0,0.1) ; PROP
 0 FIX ; ADD
 (0,500) ; Vp (V3)
 (0,100) ; Q
 (0,50) ; CLm
 (0,100) ; Vm
 (0,4) ; KM
 (0,0.8) ; F1 (1800 mg)
; KM is Cmax for the dose that begins to indicate saturation (1800 mg)
$OMEGA  0.2  ;  IIV CLINT
 0  FIX  ;     IIV Vc
 0  FIX  ;     IIV KA
 0.2  ;    IIV CLm
 0  FIX  ;     IIV Vm
 0  FIX  ;     IIV KM
$SIGMA  1  FIX  ; Residual variability
 1  FIX
$ESTIMATION METH=1 INTERACTION LAPLACIAN MAXEVAL=9999 NITER=100 NSIG=3
            NOABORT PRINT=10
$COVARIANCE UNCONDITIONAL PRINT=E
$TABLE      ID TIME DV AMT EVID MDV CMT SEX AGE TRTPN MFL RACEN
            ETHNICN WEIGHTSC BMISC BLOQ_new STRT CLINT V V2 Q KA CLm
            Vm KM ETA1 ETA4 IPRED PRED CWRES IWRES ONEHEADER NOPRINT
            FILE=tab135

NM-TRAN MESSAGES
 WARNINGS AND ERRORS (IF ANY) FOR PROBLEM    1
 (WARNING  2) NM-TRAN INFERS THAT THE DATA ARE POPULATION.
 (WARNING  3) THERE MAY BE AN ERROR IN THE ABBREVIATED CODE. THE FOLLOWING
 ONE OR MORE RANDOM VARIABLES ARE DEFINED WITH "IF" STATEMENTS THAT DO NOT
 PROVIDE DEFINITIONS FOR BOTH THE "THEN" AND "ELSE" CASES. IF ALL
 CONDITIONS FAIL, THE VALUES OF THESE VARIABLES WILL BE ZERO.
   Y
 (WARNING  87) WITH "LAPLACIAN" AND "INTERACTION", "NUMERICAL" AND "SLOW"
 ARE ALSO REQUIRED ON $ESTIM RECORD, AND "SLOW" IS REQUIRED ON $COV
 RECORD. NM-TRAN HAS SUPPLIED THESE OPTIONS.

1NONLINEAR MIXED EFFECTS MODEL PROGRAM (NONMEM) VERSION 7.5.0
 ORIGINALLY DEVELOPED BY STUART BEAL, LEWIS SHEINER, AND ALISON BOECKMANN
 CURRENT DEVELOPERS ARE ROBERT BAUER, ICON DEVELOPMENT SOLUTIONS,
 AND ALISON BOECKMANN. IMPLEMENTATION, EFFICIENCY, AND STANDARDIZATION
 PERFORMED BY NOUS INFOSYSTEMS.
 PROBLEM NO.:         1
 SUTEZOLID population PK
 TOT. NO. OF OBS RECS:      864
 TOT. NO. OF INDIVIDUALS:       24
 GENERAL NONLINEAR KINETICS MODEL (DVERK1, ADVAN6)
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 #TBLN:      1
 #METH: Laplacian Conditional Estimation with Interaction
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
 #TERM:
0MINIMIZATION SUCCESSFUL
 NO. OF FUNCTION EVALUATIONS USED:      722
 NO. OF SIG. DIGITS IN FINAL EST.:  3.1

 ETABAR IS THE ARITHMETIC MEAN OF THE ETA-ESTIMATES,
 AND THE P-VALUE IS GIVEN FOR THE NULL HYPOTHESIS THAT THE TRUE MEAN IS 0.

 ETABAR:         5.5205E-03  0.0000E+00  0.0000E+00  1.0409E-02  0.0000E+00  0.0000E+00
 SE:             7.6989E-02  0.0000E+00  0.0000E+00  6.8092E-02  0.0000E+00  0.0000E+00
 N:                      24          24          24          24          24          24

 P VAL.:         9.4284E-01  1.0000E+00  1.0000E+00  8.7850E-01  1.0000E+00  1.0000E+00

 ETASHRINKSD(%)  1.0000E-10  0.0000E+00  0.0000E+00  9.9975E-01  0.0000E+00  0.0000E+00
 ETASHRINKVR(%)  1.0000E-10  0.0000E+00  0.0000E+00  1.9895E+00  0.0000E+00  0.0000E+00
 EBVSHRINKSD(%)  8.7457E-01  0.0000E+00  0.0000E+00  3.1618E+00  0.0000E+00  0.0000E+00
 EBVSHRINKVR(%)  1.7415E+00  0.0000E+00  0.0000E+00  6.2237E+00  0.0000E+00  0.0000E+00
 RELATIVEINF(%)  9.8253E+01  0.0000E+00  0.0000E+00  9.3771E+01  0.0000E+00  0.0000E+00
 EPSSHRINKSD(%)  1.0000E-10  1.3039E+01
 EPSSHRINKVR(%)  1.0000E-10  2.4377E+01


 TOTAL DATA POINTS NORMALLY DISTRIBUTED (N):          761
 N*LOG(2PI) CONSTANT TO OBJECTIVE FUNCTION:    1398.6244475375117
 OBJECTIVE FUNCTION VALUE WITHOUT CONSTANT:   -1724.8145623767105
 OBJECTIVE FUNCTION VALUE WITH CONSTANT:      -326.19011483919871
 REPORTED OBJECTIVE FUNCTION DOES NOT CONTAIN CONSTANT

 TOTAL EFFECTIVE ETAS (NIND*NETA):                            48


 #TERE:
 Elapsed estimation  time in seconds:   290.47
 Elapsed covariance  time in seconds:   142.10
 Elapsed postprocess time in seconds:     0.51

 ********************                LAPLACIAN CONDITIONAL ESTIMATION WITH INTERACTION               ********************
 #OBJT:**************                       MINIMUM VALUE OF OBJECTIVE FUNCTION                      ********************
 #OBJV:********************************************    -1724.815       **************************************************

 ********************                LAPLACIAN CONDITIONAL ESTIMATION WITH INTERACTION               ********************
 ********************                             FINAL PARAMETER ESTIMATE                           ********************

 THETA - VECTOR OF FIXED EFFECTS PARAMETERS   *********
         TH 1      TH 2      TH 3      TH 4      TH 5      TH 6      TH 7      TH 8      TH 9      TH10      TH11
         1.67E+02  4.92E+02  9.09E-01  4.07E-01  0.00E+00  5.59E+02  1.00E+02  2.79E+01  2.08E+00  1.56E+00  5.94E-01

 OMEGA - COV MATRIX FOR RANDOM EFFECTS - ETAS  ********
         ETA1      ETA2      ETA3      ETA4      ETA5      ETA6
 ETA1
+        1.45E-01
 ETA2
+        0.00E+00  0.00E+00
 ETA3
+        0.00E+00  0.00E+00  0.00E+00
 ETA4
+        0.00E+00  0.00E+00  0.00E+00  1.18E-01
 ETA5
+        0.00E+00  0.00E+00  0.00E+00  0.00E+00  0.00E+00
 ETA6
+        0.00E+00  0.00E+00  0.00E+00  0.00E+00  0.00E+00  0.00E+00

 SIGMA - COV MATRIX FOR RANDOM EFFECTS - EPSILONS  ****
         EPS1      EPS2
 EPS1
+        1.00E+00
 EPS2
+        0.00E+00  1.00E+00

 OMEGA - CORR MATRIX FOR RANDOM EFFECTS - ETAS  *******
         ETA1      ETA2      ETA3      ETA4      ETA5      ETA6
 ETA1
+        3.81E-01
 ETA2
+        0.00E+00  0.00E+00
 ETA3
+        0.00E+00  0.00E+00  0.00E+00
 ETA4
+        0.00E+00  0.00E+00  0.00E+00  3.44E-01
 ETA5
+        0.00E+00  0.00E+00  0.00E+00  0.00E+00  0.00E+00
 ETA6
+        0.00E+00  0.00E+00  0.00E+00  0.00E+00  0.00E+00  0.00E+00

 SIGMA - CORR MATRIX FOR RANDOM EFFECTS - EPSILONS  ***
         EPS1      EPS2
 EPS1
+        1.00E+00
 EPS2
+        0.00E+00  1.00E+00

 ********************                LAPLACIAN CONDITIONAL ESTIMATION WITH INTERACTION               ********************
 ********************                            STANDARD ERROR OF ESTIMATE                          ********************

 THETA - VECTOR OF FIXED EFFECTS PARAMETERS   *********
         TH 1      TH 2      TH 3      TH 4      TH 5      TH 6      TH 7      TH 8      TH 9      TH10      TH11
         2.59E+01  1.26E+02  3.14E-01  2.48E-02 .........  1.02E+02  2.29E+01  2.40E+00  1.68E+00  6.55E-01  9.86E-02

 OMEGA - COV MATRIX FOR RANDOM EFFECTS - ETAS  ********
         ETA1      ETA2      ETA3      ETA4      ETA5      ETA6
 ETA1
+        5.82E-02
 ETA2
+       ......... .........
 ETA3
+       ......... ......... .........
 ETA4
+       ......... ......... .........  9.08E-02
 ETA5
+       ......... ......... ......... ......... .........
 ETA6
+       ......... ......... ......... ......... ......... .........

 SIGMA - COV MATRIX FOR RANDOM EFFECTS - EPSILONS  ****
         EPS1      EPS2
 EPS1
+       .........
 EPS2
+       ......... .........

 OMEGA - CORR MATRIX FOR RANDOM EFFECTS - ETAS  *******
         ETA1      ETA2      ETA3      ETA4      ETA5      ETA6
 ETA1
+        7.63E-02
 ETA2
+       ......... .........
 ETA3
+       ......... ......... .........
 ETA4
+       ......... ......... .........  1.32E-01
 ETA5
+       ......... ......... ......... ......... .........
 ETA6
+       ......... ......... ......... ......... ......... .........

 SIGMA - CORR MATRIX FOR RANDOM EFFECTS - EPSILONS  ***
         EPS1      EPS2
 EPS1
+       .........
 EPS2
+       ......... .........
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
 ********************                LAPLACIAN CONDITIONAL ESTIMATION WITH INTERACTION               ********************
 ********************                      EIGENVALUES OF COR MATRIX OF ESTIMATE                     ********************

             1         2         3         4         5         6         7         8         9        10        11        12
         5.83E-03  7.92E-03  2.17E-02  5.31E-02  1.16E-01  1.63E-01  2.20E-01  5.90E-01  8.09E-01  1.51E+00  3.39E+00  5.11E+00
 Elapsed finaloutput time in seconds:     0.31
 #CPUT: Total CPU Time in Seconds,      432.626
