Tue May 21 20:52:47 PDT 2024
;; 1. Based on: run02
;; 2. Description: mCLB073 mouse plasma pk 1-cmt, proportional error: Changed the sig value to 2
;; x1. Author: user
;; Description: mCLB073 mouse plasma pk 1-cmt, proportional error
;; Author: aebustion
$PROBLEM    mouse plasma PK 1cmt prop error
$INPUT      ID TIME DOSEMGKG DVNGML WTG WTKG DV AMT EVID MDV AMTUG
$DATA      data_03.25.24.csv IGNORE=@
$SUBROUTINE ADVAN6 TOL=5
$MODEL      NCOMP=1 COMP=(CENTRAL,DEFDOSE)
$PK
CL = THETA(1)*EXP(ETA(1))
V  = THETA(2)
KE = CL/V

$DES
DADT(1)=-A(1)*KE

$ERROR
IPRED=A(1)/V    ; predicting concentration
WA=THETA(3)    ; still including a theta for additive error. we'll fix it to zero in the THETA block
WP=THETA(4)
W = SQRT(WA**2+(WP*IPRED)**2)
IRES=DV-IPRED
IWRES=IRES/W
Y = IPRED + W*EPS(1)

$THETA  (0,0.00904) ; 1 CL L/h (based on excel estimates)
 (0,0.0669) ; 2 V L (based on excel estimates)
 0 FIX ; 3 Additive Error. Do (0)FIX for a proportional error model.
 (0,0.168) ; 4 Proportional Error. Do (0)FIX for an additive error model.
$OMEGA  0  FIX  ;     CL IIV
$SIGMA  1  FIX  ; eps residual variance
$ESTIMATION METHOD=1 INTERACTION PRINT=5 SIG=2 MAXEVAL=9999 NOABORT
$COVARIANCE UNCONDITIONAL
$TABLE      ID TIME IPRED PRED DV AMT WRES IWRES CWRES EVID
            FILE=sdtab04 NOPRINT ONEHEADER

NM-TRAN MESSAGES
 WARNINGS AND ERRORS (IF ANY) FOR PROBLEM    1
 (WARNING  2) NM-TRAN INFERS THAT THE DATA ARE POPULATION.
Note: Analytical 2nd Derivatives are constructed in FSUBS but are never used.
      You may insert $ABBR DERIV2=NO after the first $PROB to save FSUBS construction and compilation time

1NONLINEAR MIXED EFFECTS MODEL PROGRAM (NONMEM) VERSION 7.5.1
 ORIGINALLY DEVELOPED BY STUART BEAL, LEWIS SHEINER, AND ALISON BOECKMANN
 CURRENT DEVELOPERS ARE ROBERT BAUER, ICON DEVELOPMENT SOLUTIONS,
 AND ALISON BOECKMANN. IMPLEMENTATION, EFFICIENCY, AND STANDARDIZATION
 PERFORMED BY NOUS INFOSYSTEMS.
 PROBLEM NO.:         1
 mouse plasma PK 1cmt prop error
 TOT. NO. OF OBS RECS:       21
 TOT. NO. OF INDIVIDUALS:        3
 GENERAL NONLINEAR KINETICS MODEL (DVERK1, ADVAN6)
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 #TBLN:      1
 #METH: First Order Conditional Estimation with Interaction
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
 #TERM:
0MINIMIZATION SUCCESSFUL
 HOWEVER, PROBLEMS OCCURRED WITH THE MINIMIZATION.
 REGARD THE RESULTS OF THE ESTIMATION STEP CAREFULLY, AND ACCEPT THEM ONLY
 AFTER CHECKING THAT THE COVARIANCE STEP PRODUCES REASONABLE OUTPUT.
 NO. OF FUNCTION EVALUATIONS USED:       30
 NO. OF SIG. DIGITS IN FINAL EST.:  2.1

 ETABAR IS THE ARITHMETIC MEAN OF THE ETA-ESTIMATES,
 AND THE P-VALUE IS GIVEN FOR THE NULL HYPOTHESIS THAT THE TRUE MEAN IS 0.

 ETABAR:         0.0000E+00
 SE:             0.0000E+00
 N:                       3

 P VAL.:         1.0000E+00

 ETASHRINKSD(%)  0.0000E+00
 ETASHRINKVR(%)  0.0000E+00
 EBVSHRINKSD(%)  0.0000E+00
 EBVSHRINKVR(%)  0.0000E+00
 RELATIVEINF(%)  0.0000E+00
 EPSSHRINKSD(%)  1.0000E-10
 EPSSHRINKVR(%)  1.0000E-10


 TOTAL DATA POINTS NORMALLY DISTRIBUTED (N):           21
 N*LOG(2PI) CONSTANT TO OBJECTIVE FUNCTION:    38.595418394596251
 OBJECTIVE FUNCTION VALUE WITHOUT CONSTANT:   -81.836105148615800
 OBJECTIVE FUNCTION VALUE WITH CONSTANT:      -43.240686754019549
 REPORTED OBJECTIVE FUNCTION DOES NOT CONTAIN CONSTANT

 TOTAL EFFECTIVE ETAS (NIND*NETA):                             0


 #TERE:
 Elapsed estimation  time in seconds:     0.00
 Elapsed covariance  time in seconds:     0.00
 Elapsed postprocess time in seconds:     0.01

 ********************               FIRST ORDER CONDITIONAL ESTIMATION WITH INTERACTION              ********************
 #OBJT:**************                       MINIMUM VALUE OF OBJECTIVE FUNCTION                      ********************
 #OBJV:********************************************      -81.836       **************************************************

 ********************               FIRST ORDER CONDITIONAL ESTIMATION WITH INTERACTION              ********************
 ********************                             FINAL PARAMETER ESTIMATE                           ********************

 THETA - VECTOR OF FIXED EFFECTS PARAMETERS   *********
         TH 1      TH 2      TH 3      TH 4
         9.04E-03  6.69E-02  0.00E+00  1.68E-01

 OMEGA - COV MATRIX FOR RANDOM EFFECTS - ETAS  ********
         ETA1
 ETA1
+        0.00E+00

 SIGMA - COV MATRIX FOR RANDOM EFFECTS - EPSILONS  ****
         EPS1
 EPS1
+        1.00E+00

 OMEGA - CORR MATRIX FOR RANDOM EFFECTS - ETAS  *******
         ETA1
 ETA1
+        0.00E+00

 SIGMA - CORR MATRIX FOR RANDOM EFFECTS - EPSILONS  ***
         EPS1
 EPS1
+        1.00E+00

 ********************               FIRST ORDER CONDITIONAL ESTIMATION WITH INTERACTION              ********************
 ********************                            STANDARD ERROR OF ESTIMATE                          ********************

 THETA - VECTOR OF FIXED EFFECTS PARAMETERS   *********
         TH 1      TH 2      TH 3      TH 4
         7.73E-06  1.34E-03 .........  1.34E-02

 OMEGA - COV MATRIX FOR RANDOM EFFECTS - ETAS  ********
         ETA1
 ETA1
+       .........

 SIGMA - COV MATRIX FOR RANDOM EFFECTS - EPSILONS  ****
         EPS1
 EPS1
+       .........

 OMEGA - CORR MATRIX FOR RANDOM EFFECTS - ETAS  *******
         ETA1
 ETA1
+       .........

 SIGMA - CORR MATRIX FOR RANDOM EFFECTS - EPSILONS  ***
         EPS1
 EPS1
+       .........

 ********************               FIRST ORDER CONDITIONAL ESTIMATION WITH INTERACTION              ********************
 ********************                          COVARIANCE MATRIX OF ESTIMATE                         ********************

            TH 1      TH 2      TH 3      TH 4      OM11      SG11
 TH 1
+        5.97E-11
 TH 2
+       -9.78E-09  1.79E-06
 TH 3
+       ......... ......... .........
 TH 4
+       -4.57E-08  7.71E-06 .........  1.79E-04
 OM11
+       ......... ......... ......... ......... .........
 SG11
+       ......... ......... ......... ......... ......... .........

 ********************               FIRST ORDER CONDITIONAL ESTIMATION WITH INTERACTION              ********************
 ********************                          CORRELATION MATRIX OF ESTIMATE                        ********************

            TH 1      TH 2      TH 3      TH 4      OM11      SG11
 TH 1
+        7.73E-06
 TH 2
+       -9.45E-01  1.34E-03
 TH 3
+       ......... ......... .........
 TH 4
+       -4.41E-01  4.30E-01 .........  1.34E-02
 OM11
+       ......... ......... ......... ......... .........
 SG11
+       ......... ......... ......... ......... ......... .........
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 Elapsed finaloutput time in seconds:     0.01
 #CPUT: Total CPU Time in Seconds,        0.018
